*Heading
** Job name: slucaj1 Model name: Model-1
** Generated by: Abaqus/CAE 6.14-5
*Preprint, echo=NO, model=NO, history=NO, contact=NO
**
** PARTS
**
*Part, name=Crane
*End Part
**
**
** ASSEMBLY
**
*Assembly, name=Assembly
**
*Instance, name=Crane-1, part=Crane
*Node
      1,           2.,           0.,           1.
      2,           2.,          0.5,          0.5
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*Element, type=B32
1,   1, 248,  84
2,  84, 249,   2
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*Nset, nset=Wire-3-Set-1
   1,   2,   3,   5,   6,   8
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*Elset, elset=Wire-3-Set-1
   1,   2,   3,   4,  15,  16
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*Nset, nset=Set-2
   1,   3,   4,   5,   6,   7
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*Elset, elset=Set-2
   9,  10,  13,  14,  19,  20
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*Nset, nset=Set-3
   1,   2,   3,   4,   5,   6
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*Elset, elset=Set-3
   1,   2,   3,   4,   5,   6
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*Nset, nset=Set-4
   1,   3,   4,   5,   6,   7
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*Elset, elset=Set-4
   9,  10,  13,  14,  25,  26
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*Nset, nset=Set-5
  10,  11,  17,  24,  30,  31
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*Elset, elset=Set-5
  19,  20,  57,  58,  89,  90
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*Nset, nset=Set-6
  36,  50,  77,  81,  82,  83, 176, 242, 247, 432, 433, 564, 565, 574, 575
*Elset, elset=Set-6
 185, 186, 317, 318, 327, 328
*Nset, nset=Set-7
  35,  51, 171, 422, 423
*Elset, elset=Set-7
 175, 176
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*Nset, nset=Set-9
  10,  11,  14,  15,  16,  17
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*Nset, nset=Set-10
   3,   4,   5,   6,   7,  20
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** Region: (O_greda:Set-3), (Beam Orientation:Set-12)
*Elset, elset=_I1, internal
   1,   2,   3,   4,  23,  24
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** Section: O_greda  Profile: O_profil
*Beam Section, elset=_I1, material=Steel, temperature=GRADIENTS, section=CIRC
r
-1.,1.,1.
** Region: (O_greda:Set-3), (Beam Orientation:Set-11)
*Elset, elset=_I2, internal
   5,   6,  71,  72,  77,  78
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** Section: O_greda  Profile: O_profil
*Beam Section, elset=_I2, material=Steel, temperature=GRADIENTS, section=CIRC
r
-2.,0.,1.
** Region: (O_greda:Set-3), (Beam Orientation:Set-10)
*Elset, elset=_I3, internal
   7,   8,  11,  12,  47,  48
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** Section: O_greda  Profile: O_profil
*Beam Section, elset=_I3, material=Steel, temperature=GRADIENTS, section=CIRC
r
0.,0.,1.
** Region: (I_greda:Set-2), (Beam Orientation:Set-4)
*Elset, elset=_I4, internal
   9,  10,  13,  14,  25,  26
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** Section: I_greda  Profile: I_profil
*Beam Section, elset=_I4, material=Steel, temperature=GRADIENTS, section=I
0., h, b, b, t, t, t
0.,1.,0.
** Region: (O_greda:Set-3), (Beam Orientation:Set-13)
*Elset, elset=_I5, internal
  15,  16,  17,  18,  21,  22
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** Section: O_greda  Profile: O_profil
*Beam Section, elset=_I5, material=Steel, temperature=GRADIENTS, section=CIRC
r
0.,-1.,1.
** Region: (I_greda:Set-2), (Beam Orientation:Set-5)
*Elset, elset=_I6, internal
  19,  20,  57,  58,  89,  90
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** Section: I_greda  Profile: I_profil
*Beam Section, elset=_I6, material=Steel, temperature=GRADIENTS, section=I
0., h, b, b, t, t, t
0.,-1.,0.
** Region: (O_greda:Set-3), (Beam Orientation:Set-8)
*Elset, elset=_I7, internal
  27,  28,  35,  36,  83,  84
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** Section: O_greda  Profile: O_profil
*Beam Section, elset=_I7, material=Steel, temperature=GRADIENTS, section=CIRC
r
-2.,0.,1.
** Region: (O_greda:Set-3), (Beam Orientation:Set-9)
*Elset, elset=_I8, internal
  29,  30,  37,  38,  85,  86
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** Section: O_greda  Profile: O_profil
*Beam Section, elset=_I8, material=Steel, temperature=GRADIENTS, section=CIRC
r
0.,1.,0.
** Region: (I_greda:Set-2), (Beam Orientation:Set-7)
*Elset, elset=_I9, internal
 175, 176
** Section: I_greda  Profile: I_profil
*Beam Section, elset=_I9, material=Steel, temperature=GRADIENTS, section=I
0., h, b, b, t, t, t
-1.,0.,0.
** Region: (I_greda:Set-2), (Beam Orientation:Set-6)
*Elset, elset=_I10, internal
 185, 186, 317, 318, 327, 328
** Section: I_greda  Profile: I_profil
*Beam Section, elset=_I10, material=Steel, temperature=GRADIENTS, section=I
0., h, b, b, t, t, t
1.,0.,0.
*End Instance
**
*Nset, nset=Set-1, instance=Crane-1
   3,   5,  17,  24,  73,  76
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*Elset, elset=Set-1, instance=Crane-1
  73,  74,  97,  98, 309, 310, 315, 316, 317, 318
*Nset, nset=Set-2, instance=Crane-1
 42, 49
*Nset, nset=Set-5, instance=Crane-1
   1,  10,  11,  13,  14,  15
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*Elset, elset=Set-5, instance=Crane-1
  19,  20,  25,  26,  27,  28
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*Nset, nset=Set-6, instance=Crane-1
   1,  10,  11,  13,  14,  15
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*Elset, elset=Set-6, instance=Crane-1
  19,  20,  25,  26,  27,  28
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*Nset, nset=Set-7, instance=Crane-1
   1,   2,   9,  10,  11,  12
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*Elset, elset=Set-7, instance=Crane-1
   1,   2,  17,  18,  19,  20
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*Nset, nset=Set-8, instance=Crane-1
 42,
*Nset, nset=Set-9, instance=Crane-1
 49,
*Nset, nset=Set-10, instance=Crane-1
 42,
*End Assembly
**
** MATERIALS
**
*Material, name=Steel
*Density
7850.,
*Elastic
 2.1e+11, 0.3
** ----------------------------------------------------------------
**
** STEP: Step-1
**
*Step, name=Step-1, nlgeom=NO
*Static
1., 1., 1e-05, 1.
**
** BOUNDARY CONDITIONS
**
** Name: Ukljestenja Type: Symmetry/Antisymmetry/Encastre
*Boundary
Set-1, ENCASTRE
**
** LOADS
**
** Name: Tezina   Type: Gravity
*Dload
, GRAV, 9.81, 0., 0., -1.
** Name: sila_kuka1   Type: Concentrated force
*Cload
Set-9, 3, -25000.
** Name: sila_kuka2   Type: Concentrated force
*Cload
Set-10, 3, -25000.
** Name: vjetar   Type: Line load
*Dload
Set-7, PY, 6.25
**
** OUTPUT REQUESTS
**
*Restart, write, frequency=0
**
** FIELD OUTPUT: F-Output-1
**
*Output, field
*Node Output
CF, RF, U
*Element Output, directions=YES
LE, MISES, MISESMAX, PE, PEEQ, PEMAG, S
*Contact Output
CDISP, CSTRESS
**
** HISTORY OUTPUT: H-Output-1
**
*Output, history, variable=PRESELECT
*End Step
